*Heading
** Job name: SKIN-JOB Model name: Model-1
** Generated by: Abaqus/CAE 2018
*Preprint, echo=NO, model=NO, history=NO, contact=NO
**
** PARTS
**
*Part, name=INFLATOR_EDGES
*Node
      1,   2.24000001,  -3.99000001,           0.
      2,  -2.24000001,  -3.99000001,           0.
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*Element, type=C3D8R
 1,  41,  64,  63,  40, 141, 164, 163, 140
 2,  54,   4,   7,  77, 154, 104, 107, 177
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*Nset, nset=_PickedSet2, internal, generate
   1,  200,    1
*Elset, elset=_PickedSet2, internal, generate
  1,  50,   1
*Orientation, name=Ori-1
1., 0., 0., 0., 1., 0.
1, 0.
** Section: Section-2
*Solid Section, elset=_PickedSet2, orientation=Ori-1, material=SAMPLE_MAT_2
,
*End Part
**
*Part, name=INFLATOR_FACE
*Node
      1,         2.25,           4., 0.00999999978
      2,         2.25,          3.5, 0.00999999978
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*Element, type=C3D8R
  1,  35,  36,  53,  52,   1,   2,  19,  18
  2,  36,  37,  54,  53,   2,   3,  20,  19
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*Nset, nset=_PickedSet2, internal, generate
   1,  340,    1
*Elset, elset=_PickedSet2, internal, generate
   1,  144,    1
*Orientation, name=Ori-1
1., 0., 0., 0., 1., 0.
1, 0.
** Section: Section-2
*Solid Section, elset=_PickedSet2, orientation=Ori-1, material=SAMPLE_MAT_2
,
*End Part
**
*Part, name=Part-1
*Node
      1,          -5.,           5.,           0.
      2,        -4.75,           5.,           0.
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*Element, type=C3D8
   1, 1682, 1683, 1724, 1723,    1,    2,   43,   42
   2, 1683, 1684, 1725, 1724,    2,    3,   44,   43
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*Nset, nset=_PickedSet18, internal, generate
    1,  5043,     1
*Elset, elset=_PickedSet18, internal, generate
    1,  3200,     1
*Orientation, name=Ori-1
1., 0., 0., 0., 1., 0.
1, 0.
** Section: UMAT_Section
*Solid Section, elset=_PickedSet18, orientation=Ori-1, material=UMAT
,
*End Part
**
**
** ASSEMBLY
**
*Assembly, name=Assembly
**
*Instance, name=Part-1-1, part=Part-1
*End Instance
**
*Instance, name=INFLATOR_FACE-2, part=INFLATOR_FACE
          0.,           0.,        -0.29
*End Instance
**
*Instance, name=INFLATOR_EDGES-1, part=INFLATOR_EDGES
          0.,           0.,        -0.28
*End Instance
**
*Node
      1,           0.,           0., -0.150000006
*Node
      2,           0.,           0., -0.100000001
*Nset, nset=Set-2, instance=Part-1-1
    1,    2,    3,    4,    5,    6
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*Elset, elset=Set-2, instance=Part-1-1
    1,    2,    3,    4,    5,    6
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*Nset, nset=_PickedSet31, internal
 1,
*Nset, nset=_PickedSet47, internal
 2,
*Nset, nset=_PickedSet48, internal, instance=INFLATOR_FACE-2, generate
   1,  340,    1
*Nset, nset=_PickedSet48, internal, instance=INFLATOR_EDGES-1, generate
   1,  200,    1
*Elset, elset=_PickedSet48, internal, instance=INFLATOR_FACE-2, generate
   1,  144,    1
*Elset, elset=_PickedSet48, internal, instance=INFLATOR_EDGES-1, generate
  1,  50,   1
*Elset, elset=_Cavity_surf_S2, internal, instance=Part-1-1
  172,  173,  174,  175,  176,  177
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*Elset, elset=_Cavity_surf_S3, internal, instance=INFLATOR_FACE-2, generate
   1,  144,    1
*Elset, elset=_Cavity_surf_S3, internal, instance=INFLATOR_EDGES-1
  2, 10, 11, 20, 21, 22
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*Elset, elset=_Cavity_surf_S6, internal, instance=INFLATOR_EDGES-1
  1,  3,  4,  5,  7, 13, 26, 32
*Elset, elset=_Cavity_surf_S5, internal, instance=INFLATOR_EDGES-1
  6, 12, 25, 31, 44, 45, 46, 47, 48
*Elset, elset=_Cavity_surf_S4, internal, instance=INFLATOR_EDGES-1
  8,  9, 14, 15, 16, 17, 18, 19, 27, 28, 33, 34, 35, 36, 37, 38
*Surface, type=ELEMENT, name=Cavity_surf
_Cavity_surf_S2, S2
_Cavity_surf_S3, S3
_Cavity_surf_S6, S6
_Cavity_surf_S4, S4
_Cavity_surf_S5, S5
*Elset, elset=__PickedSurf32_S2, internal, instance=Part-1-1
  172,  173,  174,  175,  176,  177
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*Surface, type=ELEMENT, name=_PickedSurf32, internal
__PickedSurf32_S2, S2
*Elset, elset=__PickedSurf33_S2, internal, instance=INFLATOR_EDGES-1, generate
  1,  50,   1
*Surface, type=ELEMENT, name=_PickedSurf33, internal
__PickedSurf33_S2, S2
*Elset, elset=__PickedSurf34_S3, internal, instance=INFLATOR_FACE-2, generate
   1,  144,    1
*Surface, type=ELEMENT, name=_PickedSurf34, internal
__PickedSurf34_S3, S3
*Elset, elset=__PickedSurf35_S1, internal, instance=INFLATOR_EDGES-1, generate
  1,  50,   1
*Surface, type=ELEMENT, name=_PickedSurf35, internal
__PickedSurf35_S1, S1
** Constraint: RIGID_INFLATOR
*Rigid Body, ref node=_PickedSet47, elset=_PickedSet48
** Constraint: TIE_1
*Tie, name=TIE_1, adjust=yes
_PickedSurf33, _PickedSurf32
** Constraint: TIE_2
*Tie, name=TIE_2, adjust=yes
_PickedSurf35, _PickedSurf34
*End Assembly
**
** MATERIALS
**
*Material, name=SAMPLE_MAT
*Density
1.,
*Elastic
 1.5e+11, 0.3
*Material, name=SAMPLE_MAT_2
*Density
1.,
*Elastic
 1e+12, 0.3
*Material, name=UMAT
*Density, dependencies=1
1., , 0.5
2., ,  1.
*Depvar
     10,
*User Defined Field
*User Material, constants=133
4.,         4.,        88.,        17.,         4.,         4.,         8.,         5.
3.4670556, 0.2727509, 3.6283383, 0.41420662, 1.5396045, 0.24857783, 1.4401962, 0.26130614
0.0011446265, 0.00103455, -0.444465, 0.17125253, 0.22849937, -0.15074943, -0.75321925, 0.28170592
0.33709332, -0.24906579, -0.22852187, 0.08772315, 0.047117546, -0.07861809, -0.5240732, 0.18569376
0.17160481, -0.18317977, 0.17582853, 0.62426394, 3.0778491, -2.6283927, -0.37363487, 0.0069426526
-1.4643925, 0.72223616, -1.5095816, -0.94679666, -2.6275759, 1.7887226, 0.80280155, 1.1281477
0.99778295, -1.4651227, -0.7294068, 0.14899524, -2.7685044, 2.4340024, 1.4871794, 0.8310743
1.4602689, -1.5556964, 0.77868867, 1.0033166, 1.0211803, -2.1133752, -1.4030876, -0.87751704
-2.1002965, 1.7576603, -4.9775147, -0.4135291, 0.041192092, -0.39278308, 0.055286884, -0.4055981
0.35497543, 0.561375, 0.13314128, 0.21568288, -0.8007255, -0.72594446, -1.15632, -0.33372048
-0.7756434, 7.4743543, 0.22543022, -0.19831285, -0.13914533, -0.25294495, -0.34468797, 0.8259606
0.17157486, 0.033157244, -0.049728207, 4.226932, -0.08925686, 0.8866373, -0.20324033, 0.6347435
4.378571, -0.24469428, 0.38325015, 0.49957907, 0.6166368, -1.041377, 0.061011247, -1.0033404
-0.07317659, -0.5678452, 3.1969743, -0.4206097, -2.8921587, 2.7449164, -0.5041842, 0.6507567
-0.10880788, -1.2621735, -0.29230505, 0.675771, -1.1878136, 0.6861823, 1.4625235, 0.6033707
1.2546945, 0.6349225, 0.86568415,         1.,         1.,         2.,       .01,         1.
         0.,         0.,         0.,         1.,         0.,
**
** INTERACTION PROPERTIES
**
*Fluid Behavior, name=FLUID_PROP
*Fluid Density
1
*Fluid Bulk Modulus
 2.2e+6,
**
** BOUNDARY CONDITIONS
**
** Name: BC-1 Type: Displacement/Rotation
*Boundary
Set-2, 1, 1
Set-2, 2, 2
Set-2, 3, 3
Set-2, 4, 4
Set-2, 5, 5
Set-2, 6, 6
**
** INTERACTIONS
**
** Interaction: CAVITY
*Fluid Cavity, name=CAVITY, behavior=FLUID_PROP, refnode=_PickedSet31, surface=Cavity_surf

** ----------------------------------------------------------------
**
** STEP: Step-1
**
*Step, name=Step-1, nlgeom=YES
*Static
1., 10., 0.0001, 1.
**
** BOUNDARY CONDITIONS
**
** Name: FILL_CAVITY Type: Fluid cavity pressure
*Boundary
_PickedSet31, 8, 8, 0.0001
**
** OUTPUT REQUESTS
**
*Restart, write, frequency=0
**
** FIELD OUTPUT: F-Output-1
**
*Output, field, variable=PRESELECT
**
** HISTORY OUTPUT: H-Output-1
**
*Output, history, variable=PRESELECT
*End Step
** ----------------------------------------------------------------
**
** STEP: Step-2
**
*Step, name=Step-2, nlgeom=YES
*Static
1., 10., 0.0001, 1.
**
** BOUNDARY CONDITIONS
**
** Name: FILL_CAVITY_2 Type: Fluid cavity pressure
*Boundary
_PickedSet31, 8, 8, 0.0002
**
** OUTPUT REQUESTS
**
*Restart, write, frequency=0
**
** FIELD OUTPUT: F-Output-1
**
*Output, field, variable=PRESELECT
**
** HISTORY OUTPUT: H-Output-1
**
*Output, history, variable=PRESELECT
*End Step
** ----------------------------------------------------------------
**
** STEP: Step-3
**
*Step, name=Step-3, nlgeom=YES
*Static
1., 10., 0.0001, 1.
**
** BOUNDARY CONDITIONS
**
** Name: FILL_CAVITY_3 Type: Fluid cavity pressure
*Boundary
_PickedSet31, 8, 8, 0.0003
**
** OUTPUT REQUESTS
**
*Restart, write, frequency=0
**
** FIELD OUTPUT: F-Output-1
**
*Output, field, variable=PRESELECT
**
** HISTORY OUTPUT: H-Output-1
**
*Output, history, variable=PRESELECT
*End Step
