*Heading
** Job name: shear_S111S1_GOH Model name: shear_S111S1_GOH
** Generated by: Abaqus/CAE 2020
*Preprint, echo=NO, model=NO, history=NO, contact=NO
**
** PARTS
**
*Part, name=PART-1
*Node
      1,          50.,          50.,          10.
      2,          50.,   47.0588226,          10.
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*Element, type=C3D8
  1,   73,   74,   92,   91,    1,    2,   20,   19
  2,   74,   75,   93,   92,    2,    3,   21,   20
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*Nset, nset=SET-1, generate
    1,  1296,     1
*Elset, elset=SET-1, generate
   1,  867,    1
*Orientation, name=Ori-1
1., 0., 0., 0., 1., 0.
1, 0.
** Section: Section-1-SET-1
*Solid Section, elset=SET-1, orientation=Ori-1, material=MATERIAL-1
,
*End Part
**
**
** ASSEMBLY
**
*Assembly, name=Assembly
**
*Instance, name=PART-1-1, part=PART-1
*End Instance
**
*Nset, nset=SET-1, instance=PART-1-1
   55,   56,   57,   58,   59,   60
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*Elset, elset=SET-1, instance=PART-1-1
  35,  36,  37,  38,  39,  40
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*Nset, nset=SET-2, instance=PART-1-1, generate
   18,  1296,    18
*Elset, elset=SET-2, instance=PART-1-1, generate
  17,  867,   17
*Nset, nset=SET-3, instance=PART-1-1, generate
 1225,  1296,     1
*Elset, elset=SET-3, instance=PART-1-1, generate
 817,  867,    1
*Nset, nset=SET-4, instance=PART-1-1, generate
  1,  72,   1
*Elset, elset=SET-4, instance=PART-1-1, generate
  1,  51,   1
*Nset, nset=SET-5, instance=PART-1-1, generate
    1,  1279,    18
*Elset, elset=SET-5, instance=PART-1-1, generate
   1,  851,   17
*Nset, nset=SET-6, instance=PART-1-1, generate
 1225,  1296,     1
*Elset, elset=SET-6, instance=PART-1-1, generate
 817,  867,    1
*End Assembly
**
** MATERIALS
**
*Material, name=MATERIAL-1
*Anisotropic Hyperelastic, holzapfel, local direction=1
 0.001349,      0.1, 0.021368,   0.1149,  0.33333
**
** BOUNDARY CONDITIONS
**
** Name: Disp-BC-1 Type: Symmetry/Antisymmetry/Encastre
*Boundary
SET-6, ENCASTRE
** ----------------------------------------------------------------
**
** STEP: Step-1
**
*Step, name=Step-1, nlgeom=YES
*Static
0.001, 0.1, 1e-06, 0.1
**
** BOUNDARY CONDITIONS
**
** Name: Disp-BC-2 Type: Displacement/Rotation
*Boundary
SET-4, 1, 1, 5.
** Name: Disp-BC-3 Type: Displacement/Rotation
*Boundary
SET-4, 2, 2, 5.
**
** OUTPUT REQUESTS
**
*Restart, write, frequency=0
**
** FIELD OUTPUT: F-Output-1
**
*Output, field, variable=PRESELECT
**
** HISTORY OUTPUT: H-Output-1
**
*Output, history, variable=PRESELECT
*End Step
